<neuroml xmlns="http://www.neuroml.org/schema/neuroml2"  xmlns:xs="http://www.w3.org/2001/XMLSchema" xmlns:xsi="http://www.w3.org/2001/XMLSchema-instance" xsi:schemaLocation="http://www.neuroml.org/schema/neuroml2 https://raw.github.com/NeuroML/NeuroML2/development/Schemas/NeuroML2/NeuroML_v2.3.1.xsd" id="c302_C1_ASEL">
    <notes>

Parameters and setting used to generate this network:

    Data reader:                    cect.readers.SpreadsheetDataReader
    c302 version:                   0.12.0
    cect version:                   0.3.1
    owmeta version:                 - not installed -
    owmeta_core version:            - not installed -
    Cells:                          ['ASEL', 'ASER', 'AWCL', 'AWCR', 'AIBL', 'AIBR', 'AIYL', 'AIYR', 'ASHL', 'ASHR', 'AVAL', 'AVAR', 'AVBL', 'AVBR', 'PVCL', 'PVCR']
    Cell stimulated:                ['ASEL', 'ASER']
    Connection:                     []
    Connection numbers overridden:  None
    Connection numbers scaled:      None
    Connection polarities override: None
    Muscles:                        []

    Known BioParameters:
        BioParameter: ca_boyle_erev = 40 mV (SRC: BlindGuess, certainty 0.1)
        BioParameter: ca_conc_decay_time = 11.5943 ms (SRC: BlindGuess, certainty 0.1)
        BioParameter: ca_conc_rho = 0.000238919 mol_per_m_per_A_per_s (SRC: BlindGuess, certainty 0.1)
        BioParameter: cell_diameter = 5 (SRC: BlindGuess, certainty 0.1)
        BioParameter: exc_syn_delta = 5 mV (SRC: BlindGuess, certainty 0.1)
        BioParameter: exc_syn_erev = 0 mV (SRC: BlindGuess, certainty 0.1)
        BioParameter: exc_syn_k = 0.025per_ms (SRC: BlindGuess, certainty 0.1)
        BioParameter: exc_syn_vth = 0 mV (SRC: BlindGuess, certainty 0.1)
        BioParameter: inh_syn_delta = 5 mV (SRC: BlindGuess, certainty 0.1)
        BioParameter: inh_syn_erev = -70 mV (SRC: BlindGuess, certainty 0.1)
        BioParameter: inh_syn_k = 0.025per_ms (SRC: BlindGuess, certainty 0.1)
        BioParameter: inh_syn_vth = 0 mV (SRC: BlindGuess, certainty 0.1)
        BioParameter: initial_memb_pot = -45 mV (SRC: BlindGuess, certainty 0.1)
        BioParameter: k_fast_erev = -60 mV (SRC: BlindGuess, certainty 0.1)
        BioParameter: k_slow_erev = -60 mV (SRC: BlindGuess, certainty 0.1)
        BioParameter: leak_erev = -50 mV (SRC: BlindGuess, certainty 0.1)
        BioParameter: muscle_ca_boyle_cond_density = 0.0007 S_per_cm2 (SRC: BlindGuess, certainty 0.1)
        BioParameter: muscle_k_fast_cond_density = 0.0001 S_per_cm2 (SRC: BlindGuess, certainty 0.1)
        BioParameter: muscle_k_slow_cond_density = 0.0006 S_per_cm2 (SRC: BlindGuess, certainty 0.1)
        BioParameter: muscle_leak_cond_density = 5e-7 S_per_cm2 (SRC: BlindGuess, certainty 0.1)
        BioParameter: muscle_length = 20 (SRC: BlindGuess, certainty 0.1)
        BioParameter: muscle_spike_thresh = -20 mV (SRC: BlindGuess, certainty 0.1)
        BioParameter: neuron_ca_boyle_cond_density = 3 mS_per_cm2 (SRC: BlindGuess, certainty 0.1)
        BioParameter: neuron_k_fast_cond_density = 0.0711643917483308 mS_per_cm2 (SRC: BlindGuess, certainty 0.1)
        BioParameter: neuron_k_slow_cond_density = 3 mS_per_cm2 (SRC: BlindGuess, certainty 0.1)
        BioParameter: neuron_leak_cond_density = 0.005 mS_per_cm2 (SRC: BlindGuess, certainty 0.1)
        BioParameter: neuron_spike_thresh = -20 mV (SRC: BlindGuess, certainty 0.1)
        BioParameter: neuron_to_muscle_elec_syn_gbase = 0.00052 nS (SRC: BlindGuess, certainty 0.1)
        BioParameter: neuron_to_muscle_exc_syn_conductance = 0.09 nS (SRC: BlindGuess, certainty 0.1)
        BioParameter: neuron_to_muscle_inh_syn_conductance = 0.09 nS (SRC: BlindGuess, certainty 0.1)
        BioParameter: neuron_to_neuron_elec_syn_gbase = 0.00052 nS (SRC: BlindGuess, certainty 0.1)
        BioParameter: neuron_to_neuron_exc_syn_conductance = 0.09 nS (SRC: BlindGuess, certainty 0.1)
        BioParameter: neuron_to_neuron_inh_syn_conductance = 0.09 nS (SRC: BlindGuess, certainty 0.1)
        BioParameter: specific_capacitance = 1 uF_per_cm2 (SRC: BlindGuess, certainty 0.1)
        BioParameter: unphysiological_offset_current = 5pA (SRC: ASEL/ASER stimulus, certainty 0)
        BioParameter: unphysiological_offset_current_del = 100ms (SRC: ASEL/ASER stimulus, certainty 0)
        BioParameter: unphysiological_offset_current_dur = 600ms (SRC: ASEL/ASER stimulus, certainty 0)

</notes>
    <include href="cell_C.xml"/>
    <fixedFactorConcentrationModel id="CaPool" ion="ca" restingConc="0 mM" decayConstant="11.5943 ms" rho="0.000238919 mol_per_m_per_A_per_s"/>
    <gapJunction id="neuron_to_neuron_elec_syn" conductance="0.00052 nS"/>
    <silentSynapse id="silent"/>
    <gradedSynapse id="neuron_to_neuron_exc_syn" conductance="0.09 nS" delta="5 mV" Vth="0 mV" k="0.025per_ms" erev="0 mV"/>
    <cell id="GenericMuscleCell">
        <morphology id="morphology_GenericMuscleCell">
            <segment id="0" name="soma">
                <proximal x="0.0" y="0.0" z="0.0" diameter="5.0"/>
                <distal x="0.0" y="20.0" z="0.0" diameter="5.0"/>
            </segment>
        </morphology>
        <biophysicalProperties id="biophys_GenericMuscleCell">
            <membraneProperties>
                <channelDensity id="Leak_all" ionChannel="Leak" condDensity="5e-7 S_per_cm2" erev="-50 mV" ion="non_specific"/>
                <channelDensity id="k_slow_all" ionChannel="k_slow" condDensity="0.0006 S_per_cm2" erev="-60 mV" ion="k"/>
                <channelDensity id="k_fast_all" ionChannel="k_fast" condDensity="0.0001 S_per_cm2" erev="-60 mV" ion="k"/>
                <channelDensity id="ca_boyle_all" ionChannel="ca_boyle" condDensity="0.0007 S_per_cm2" erev="40 mV" ion="ca"/>
                <spikeThresh value="-20 mV"/>
                <specificCapacitance value="1 uF_per_cm2"/>
                <initMembPotential value="-45 mV"/>
            </membraneProperties>
            <intracellularProperties>
                <species id="ca" concentrationModel="CaPool" ion="ca" initialConcentration="0 mM" initialExtConcentration="2E-6 mol_per_cm3"/>
                <resistivity value="0.1 kohm_cm"/>
            </intracellularProperties>
        </biophysicalProperties>
    </cell>
    <cell id="GenericNeuronCell">
        <morphology id="morphology_GenericNeuronCell">
            <segment id="0" name="soma">
                <proximal x="0.0" y="0.0" z="0.0" diameter="5.0"/>
                <distal x="0.0" y="0.0" z="0.0" diameter="5.0"/>
            </segment>
        </morphology>
        <biophysicalProperties id="biophys_GenericNeuronCell">
            <membraneProperties>
                <channelDensity id="Leak_all" ionChannel="Leak" condDensity="0.005 mS_per_cm2" erev="-50 mV" ion="non_specific"/>
                <channelDensity id="k_slow_all" ionChannel="k_slow" condDensity="3 mS_per_cm2" erev="-60 mV" ion="k"/>
                <channelDensity id="k_fast_all" ionChannel="k_fast" condDensity="0.0711643917483308 mS_per_cm2" erev="-60 mV" ion="k"/>
                <channelDensity id="ca_boyle_all" ionChannel="ca_boyle" condDensity="3 mS_per_cm2" erev="40 mV" ion="ca"/>
                <spikeThresh value="-20 mV"/>
                <specificCapacitance value="1 uF_per_cm2"/>
                <initMembPotential value="-45 mV"/>
            </membraneProperties>
            <intracellularProperties>
                <species id="ca" concentrationModel="CaPool" ion="ca" initialConcentration="0 mM" initialExtConcentration="2E-6 mol_per_cm3"/>
                <resistivity value="0.1 kohm_cm"/>
            </intracellularProperties>
        </biophysicalProperties>
    </cell>
    <pulseGenerator id="offset_current" delay="100ms" duration="600ms" amplitude="5pA"/>
    <network id="c302_C1_ASEL">
        <property tag="recommended_duration_ms" value="800"/>
        <property tag="recommended_dt_ms" value="0.05"/>
        <population id="AIBL" component="GenericNeuronCell" size="1" type="populationList">
            <property tag="type" value="interneuron"/>
            <property tag="receptor" value="GGR-1; GLR-1; GLR-2; GLR-5; MGL-2; MOD-1; SER-4"/>
            <property tag="neurotransmitter" value="Glutamate"/>
            <instance id="0">
                <location x="2.7" y="-266.199979999999982" z="37.0"/>
            </instance>
        </population>
        <population id="AIBR" component="GenericNeuronCell" size="1" type="populationList">
            <property tag="type" value="interneuron"/>
            <property tag="receptor" value="GGR-1; GLR-1; GLR-2; GLR-5; MGL-2; MOD-1; SER-1; SER-4"/>
            <property tag="neurotransmitter" value=""/>
            <instance id="0">
                <location x="-6.8999996" y="-266.199979999999982" z="37.0"/>
            </instance>
        </population>
        <population id="AIYL" component="GenericNeuronCell" size="1" type="populationList">
            <property tag="type" value="interneuron"/>
            <property tag="receptor" value="ACR-14; C50F7.1; CKR-2; GAR-2; GCY-1; GLC-3; LGC-38; MGL-1; MOD-1; NPR-11; NPR-14; OCTR-1; SER-2; SRA-11"/>
            <property tag="neurotransmitter" value="Acetylcholine"/>
            <instance id="0">
                <location x="7.4500003" y="-252.500020000000006" z="28.949999999999999"/>
            </instance>
        </population>
        <population id="AIYR" component="GenericNeuronCell" size="1" type="populationList">
            <property tag="type" value="interneuron"/>
            <property tag="receptor" value="ACR-14; C50F7.1; CKR-2; GAR-2; GCY-1; GLC-3; LGC-38; MGL-1; MOD-1; NPR-11; NPR-14; OCTR-1; SER-2; SRA-11"/>
            <property tag="neurotransmitter" value="Acetylcholine"/>
            <instance id="0">
                <location x="-11.699999999999999" y="-252.500020000000006" z="28.949999999999999"/>
            </instance>
        </population>
        <population id="ASEL" component="GenericNeuronCell" size="1" type="populationList">
            <property tag="type" value="sensory"/>
            <property tag="receptor" value="DEL-3; DEL-4; DOP-3; DOP-5; GCY-14; GCY-19; GCY-20; GCY-29; GCY-6; GCY-7; MGL-3; NPR-1; NPR-15; NPR-5; NTR-1; OSM-9; SRAB-14; SRD-33; SRG-30; SRX-76; TMC-1; TRPA-2; TYRA-2"/>
            <property tag="neurotransmitter" value="Glutamate"/>
            <instance id="0">
                <location x="4.125" y="-263.675000000000011" z="40.049999999999997"/>
            </instance>
        </population>
        <population id="ASER" component="GenericNeuronCell" size="1" type="populationList">
            <property tag="type" value="sensory"/>
            <property tag="receptor" value="DAF-2; DEL-3; DEL-4; DOP-3; DOP-5; GCY-1; GCY-19; GCY-22; GCY-29; GCY-3; GCY-4; GCY-5; MGL-3; NPR-1; NPR-15; NPR-5; NTR-1; OSM-9; SRAB-14; SRD-33; SRG-30; SRX-76; TMC-1; TRP-2; TRPA-2; TYRA-2"/>
            <property tag="neurotransmitter" value="Glutamate"/>
            <instance id="0">
                <location x="-8.375" y="-263.675000000000011" z="40.049999999999997"/>
            </instance>
        </population>
        <population id="ASHL" component="GenericNeuronCell" size="1" type="populationList">
            <property tag="type" value="sensory"/>
            <property tag="receptor" value="DCAR-1; DOP-4; NPR-1; NPR-2; NTR-1; NTR-2; OCR-2; OCTR-1; OSM-9; SER-3; SER-5; SRA-6; SRB-6; TMC-1; TRPA-1; TYRA-2; UNC-8"/>
            <property tag="neurotransmitter" value="Glutamate"/>
            <instance id="0">
                <location x="5.55" y="-265.625" z="41.0"/>
            </instance>
        </population>
        <population id="ASHR" component="GenericNeuronCell" size="1" type="populationList">
            <property tag="type" value="sensory"/>
            <property tag="receptor" value="DCAR-1; DOP-4; NPR-1; NPR-2; NTR-1; NTR-2; OCR-2; OCTR-1; OSM-9; SER-3; SER-5; SRA-6; SRB-6; TMC-1; TRPA-1; TYRA-2; UNC-8"/>
            <property tag="neurotransmitter" value="Glutamate"/>
            <instance id="0">
                <location x="-9.800000000000001" y="-265.625" z="41.0"/>
            </instance>
        </population>
        <population id="AVAL" component="GenericNeuronCell" size="1" type="populationList">
            <property tag="type" value="interneuron"/>
            <property tag="receptor" value="GGR-3; GLR-1; GLR-2; GLR-4; GLR-5; NMR-1; NMR-2; NPR-4; UNC-8"/>
            <property tag="neurotransmitter" value=""/>
            <property tag="OpenWormBackerAssignedName" value="JUD"/>
            <instance id="0">
                <location x="-0.55" y="-271.5" z="37.982999999999997"/>
            </instance>
        </population>
        <population id="AVAR" component="GenericNeuronCell" size="1" type="populationList">
            <property tag="type" value="interneuron"/>
            <property tag="receptor" value="GGR-3; GLR-1; GLR-2; GLR-4; GLR-5; NMR-1; NMR-2; NPR-4; UNC-8"/>
            <property tag="neurotransmitter" value=""/>
            <instance id="0">
                <location x="-3.5" y="-271.5" z="37.982999999999997"/>
            </instance>
        </population>
        <population id="AVBL" component="GenericNeuronCell" size="1" type="populationList">
            <property tag="type" value="interneuron"/>
            <property tag="receptor" value="GGR-3; GLR-1; GLR-5; LGC-55; SRA-11; UNC-8"/>
            <property tag="neurotransmitter" value=""/>
            <instance id="0">
                <location x="0.225" y="-269.793999999999983" z="37.863002999999999"/>
            </instance>
        </population>
        <population id="AVBR" component="GenericNeuronCell" size="1" type="populationList">
            <property tag="type" value="interneuron"/>
            <property tag="receptor" value="GGR-3; GLR-1; GLR-5; LGC-55; SRA-11; UNC-8"/>
            <property tag="neurotransmitter" value=""/>
            <property tag="OpenWormBackerAssignedName" value="mn"/>
            <instance id="0">
                <location x="-4.581" y="-269.793999999999983" z="37.863002999999999"/>
            </instance>
        </population>
        <population id="AWCL" component="GenericNeuronCell" size="1" type="populationList">
            <property tag="type" value="sensory"/>
            <property tag="receptor" value="DAF-11; OSM-9; STR-2; TYRA-3"/>
            <property tag="neurotransmitter" value="Glutamate"/>
            <instance id="0">
                <location x="3.8" y="-267.949999999999989" z="38.950000000000003"/>
            </instance>
        </population>
        <population id="AWCR" component="GenericNeuronCell" size="1" type="populationList">
            <property tag="type" value="sensory"/>
            <property tag="receptor" value="DAF-11; OSM-9; STR-2; TYRA-3"/>
            <property tag="neurotransmitter" value="Glutamate"/>
            <instance id="0">
                <location x="-8.1" y="-267.949999999999989" z="38.950000000000003"/>
            </instance>
        </population>
        <population id="PVCL" component="GenericNeuronCell" size="1" type="populationList">
            <property tag="type" value="interneuron"/>
            <property tag="receptor" value="PDFR-1; SER-2"/>
            <property tag="neurotransmitter" value="Acetylcholine"/>
            <property tag="OpenWormBackerAssignedName" value="Ramana Kumar"/>
            <instance id="0">
                <location x="0.85" y="404.150019999999984" z="5.5"/>
            </instance>
        </population>
        <population id="PVCR" component="GenericNeuronCell" size="1" type="populationList">
            <property tag="type" value="interneuron"/>
            <property tag="receptor" value="PDFR-1; SER-2"/>
            <property tag="neurotransmitter" value="Acetylcholine"/>
            <property tag="OpenWormBackerAssignedName" value="J. Pablo Fernandez"/>
            <instance id="0">
                <location x="-3.4499998" y="404.150019999999984" z="5.5"/>
            </instance>
        </population>
        <electricalProjection id="NC_AIYL_AIYR_Generic_GJ" presynapticPopulation="AIYL" postsynapticPopulation="AIYR">
            <electricalConnectionInstanceW id="0" preCell="../AIYL/0/GenericNeuronCell" postCell="../AIYR/0/GenericNeuronCell" synapse="neuron_to_neuron_elec_syn" weight="1.0"/>
        </electricalProjection>
        <electricalProjection id="NC_AIYR_AIYL_Generic_GJ" presynapticPopulation="AIYR" postsynapticPopulation="AIYL">
            <electricalConnectionInstanceW id="0" preCell="../AIYR/0/GenericNeuronCell" postCell="../AIYL/0/GenericNeuronCell" synapse="neuron_to_neuron_elec_syn" weight="1.0"/>
        </electricalProjection>
        <electricalProjection id="NC_ASHL_ASHR_Generic_GJ" presynapticPopulation="ASHL" postsynapticPopulation="ASHR">
            <electricalConnectionInstanceW id="0" preCell="../ASHL/0/GenericNeuronCell" postCell="../ASHR/0/GenericNeuronCell" synapse="neuron_to_neuron_elec_syn" weight="1.0"/>
        </electricalProjection>
        <electricalProjection id="NC_ASHR_ASHL_Generic_GJ" presynapticPopulation="ASHR" postsynapticPopulation="ASHL">
            <electricalConnectionInstanceW id="0" preCell="../ASHR/0/GenericNeuronCell" postCell="../ASHL/0/GenericNeuronCell" synapse="neuron_to_neuron_elec_syn" weight="1.0"/>
        </electricalProjection>
        <electricalProjection id="NC_AVAL_AVAR_Generic_GJ" presynapticPopulation="AVAL" postsynapticPopulation="AVAR">
            <electricalConnectionInstanceW id="0" preCell="../AVAL/0/GenericNeuronCell" postCell="../AVAR/0/GenericNeuronCell" synapse="neuron_to_neuron_elec_syn" weight="5.0"/>
        </electricalProjection>
        <electricalProjection id="NC_AVAL_PVCL_Generic_GJ" presynapticPopulation="AVAL" postsynapticPopulation="PVCL">
            <electricalConnectionInstanceW id="0" preCell="../AVAL/0/GenericNeuronCell" postCell="../PVCL/0/GenericNeuronCell" synapse="neuron_to_neuron_elec_syn" weight="2.0"/>
        </electricalProjection>
        <electricalProjection id="NC_AVAL_PVCR_Generic_GJ" presynapticPopulation="AVAL" postsynapticPopulation="PVCR">
            <electricalConnectionInstanceW id="0" preCell="../AVAL/0/GenericNeuronCell" postCell="../PVCR/0/GenericNeuronCell" synapse="neuron_to_neuron_elec_syn" weight="5.0"/>
        </electricalProjection>
        <electricalProjection id="NC_AVAR_AVAL_Generic_GJ" presynapticPopulation="AVAR" postsynapticPopulation="AVAL">
            <electricalConnectionInstanceW id="0" preCell="../AVAR/0/GenericNeuronCell" postCell="../AVAL/0/GenericNeuronCell" synapse="neuron_to_neuron_elec_syn" weight="5.0"/>
        </electricalProjection>
        <electricalProjection id="NC_AVAR_PVCR_Generic_GJ" presynapticPopulation="AVAR" postsynapticPopulation="PVCR">
            <electricalConnectionInstanceW id="0" preCell="../AVAR/0/GenericNeuronCell" postCell="../PVCR/0/GenericNeuronCell" synapse="neuron_to_neuron_elec_syn" weight="3.0"/>
        </electricalProjection>
        <electricalProjection id="NC_AVBL_AVBR_Generic_GJ" presynapticPopulation="AVBL" postsynapticPopulation="AVBR">
            <electricalConnectionInstanceW id="0" preCell="../AVBL/0/GenericNeuronCell" postCell="../AVBR/0/GenericNeuronCell" synapse="neuron_to_neuron_elec_syn" weight="3.0"/>
        </electricalProjection>
        <electricalProjection id="NC_AVBR_AVBL_Generic_GJ" presynapticPopulation="AVBR" postsynapticPopulation="AVBL">
            <electricalConnectionInstanceW id="0" preCell="../AVBR/0/GenericNeuronCell" postCell="../AVBL/0/GenericNeuronCell" synapse="neuron_to_neuron_elec_syn" weight="3.0"/>
        </electricalProjection>
        <electricalProjection id="NC_PVCL_AVAL_Generic_GJ" presynapticPopulation="PVCL" postsynapticPopulation="AVAL">
            <electricalConnectionInstanceW id="0" preCell="../PVCL/0/GenericNeuronCell" postCell="../AVAL/0/GenericNeuronCell" synapse="neuron_to_neuron_elec_syn" weight="2.0"/>
        </electricalProjection>
        <electricalProjection id="NC_PVCL_PVCR_Generic_GJ" presynapticPopulation="PVCL" postsynapticPopulation="PVCR">
            <electricalConnectionInstanceW id="0" preCell="../PVCL/0/GenericNeuronCell" postCell="../PVCR/0/GenericNeuronCell" synapse="neuron_to_neuron_elec_syn" weight="5.0"/>
        </electricalProjection>
        <electricalProjection id="NC_PVCR_AVAL_Generic_GJ" presynapticPopulation="PVCR" postsynapticPopulation="AVAL">
            <electricalConnectionInstanceW id="0" preCell="../PVCR/0/GenericNeuronCell" postCell="../AVAL/0/GenericNeuronCell" synapse="neuron_to_neuron_elec_syn" weight="5.0"/>
        </electricalProjection>
        <electricalProjection id="NC_PVCR_AVAR_Generic_GJ" presynapticPopulation="PVCR" postsynapticPopulation="AVAR">
            <electricalConnectionInstanceW id="0" preCell="../PVCR/0/GenericNeuronCell" postCell="../AVAR/0/GenericNeuronCell" synapse="neuron_to_neuron_elec_syn" weight="3.0"/>
        </electricalProjection>
        <electricalProjection id="NC_PVCR_PVCL_Generic_GJ" presynapticPopulation="PVCR" postsynapticPopulation="PVCL">
            <electricalConnectionInstanceW id="0" preCell="../PVCR/0/GenericNeuronCell" postCell="../PVCL/0/GenericNeuronCell" synapse="neuron_to_neuron_elec_syn" weight="5.0"/>
        </electricalProjection>
        <continuousProjection id="NC_AIBL_AIYL_Glutamate" presynapticPopulation="AIBL" postsynapticPopulation="AIYL">
            <continuousConnectionInstanceW id="0" preCell="../AIBL/0/GenericNeuronCell" postCell="../AIYL/0/GenericNeuronCell" preComponent="silent" postComponent="neuron_to_neuron_exc_syn" weight="1.0"/>
        </continuousProjection>
        <continuousProjection id="NC_AIBL_ASER_Glutamate" presynapticPopulation="AIBL" postsynapticPopulation="ASER">
            <continuousConnectionInstanceW id="0" preCell="../AIBL/0/GenericNeuronCell" postCell="../ASER/0/GenericNeuronCell" preComponent="silent" postComponent="neuron_to_neuron_exc_syn" weight="1.0"/>
        </continuousProjection>
        <continuousProjection id="NC_AIBL_AVAL_Glutamate" presynapticPopulation="AIBL" postsynapticPopulation="AVAL">
            <continuousConnectionInstanceW id="0" preCell="../AIBL/0/GenericNeuronCell" postCell="../AVAL/0/GenericNeuronCell" preComponent="silent" postComponent="neuron_to_neuron_exc_syn" weight="2.0"/>
        </continuousProjection>
        <continuousProjection id="NC_AIBL_AVBL_Glutamate" presynapticPopulation="AIBL" postsynapticPopulation="AVBL">
            <continuousConnectionInstanceW id="0" preCell="../AIBL/0/GenericNeuronCell" postCell="../AVBL/0/GenericNeuronCell" preComponent="silent" postComponent="neuron_to_neuron_exc_syn" weight="5.0"/>
        </continuousProjection>
        <continuousProjection id="NC_AIBR_AVAR_Glutamate" presynapticPopulation="AIBR" postsynapticPopulation="AVAR">
            <continuousConnectionInstanceW id="0" preCell="../AIBR/0/GenericNeuronCell" postCell="../AVAR/0/GenericNeuronCell" preComponent="silent" postComponent="neuron_to_neuron_exc_syn" weight="1.0"/>
        </continuousProjection>
        <continuousProjection id="NC_AIBR_AVBR_Glutamate" presynapticPopulation="AIBR" postsynapticPopulation="AVBR">
            <continuousConnectionInstanceW id="0" preCell="../AIBR/0/GenericNeuronCell" postCell="../AVBR/0/GenericNeuronCell" preComponent="silent" postComponent="neuron_to_neuron_exc_syn" weight="3.0"/>
        </continuousProjection>
        <continuousProjection id="NC_AIYL_AWCL_Acetylcholine" presynapticPopulation="AIYL" postsynapticPopulation="AWCL">
            <continuousConnectionInstanceW id="0" preCell="../AIYL/0/GenericNeuronCell" postCell="../AWCL/0/GenericNeuronCell" preComponent="silent" postComponent="neuron_to_neuron_exc_syn" weight="1.0"/>
        </continuousProjection>
        <continuousProjection id="NC_AIYL_AWCR_Acetylcholine" presynapticPopulation="AIYL" postsynapticPopulation="AWCR">
            <continuousConnectionInstanceW id="0" preCell="../AIYL/0/GenericNeuronCell" postCell="../AWCR/0/GenericNeuronCell" preComponent="silent" postComponent="neuron_to_neuron_exc_syn" weight="1.0"/>
        </continuousProjection>
        <continuousProjection id="NC_ASEL_AIBL_FMRFamide" presynapticPopulation="ASEL" postsynapticPopulation="AIBL">
            <continuousConnectionInstanceW id="0" preCell="../ASEL/0/GenericNeuronCell" postCell="../AIBL/0/GenericNeuronCell" preComponent="silent" postComponent="neuron_to_neuron_exc_syn" weight="7.0"/>
        </continuousProjection>
        <continuousProjection id="NC_ASEL_AIBR_FMRFamide" presynapticPopulation="ASEL" postsynapticPopulation="AIBR">
            <continuousConnectionInstanceW id="0" preCell="../ASEL/0/GenericNeuronCell" postCell="../AIBR/0/GenericNeuronCell" preComponent="silent" postComponent="neuron_to_neuron_exc_syn" weight="2.0"/>
        </continuousProjection>
        <continuousProjection id="NC_ASEL_AIYL_FMRFamide" presynapticPopulation="ASEL" postsynapticPopulation="AIYL">
            <continuousConnectionInstanceW id="0" preCell="../ASEL/0/GenericNeuronCell" postCell="../AIYL/0/GenericNeuronCell" preComponent="silent" postComponent="neuron_to_neuron_exc_syn" weight="13.0"/>
        </continuousProjection>
        <continuousProjection id="NC_ASEL_AIYR_FMRFamide" presynapticPopulation="ASEL" postsynapticPopulation="AIYR">
            <continuousConnectionInstanceW id="0" preCell="../ASEL/0/GenericNeuronCell" postCell="../AIYR/0/GenericNeuronCell" preComponent="silent" postComponent="neuron_to_neuron_exc_syn" weight="6.0"/>
        </continuousProjection>
        <continuousProjection id="NC_ASEL_AWCL_FMRFamide" presynapticPopulation="ASEL" postsynapticPopulation="AWCL">
            <continuousConnectionInstanceW id="0" preCell="../ASEL/0/GenericNeuronCell" postCell="../AWCL/0/GenericNeuronCell" preComponent="silent" postComponent="neuron_to_neuron_exc_syn" weight="4.0"/>
        </continuousProjection>
        <continuousProjection id="NC_ASEL_AWCR_FMRFamide" presynapticPopulation="ASEL" postsynapticPopulation="AWCR">
            <continuousConnectionInstanceW id="0" preCell="../ASEL/0/GenericNeuronCell" postCell="../AWCR/0/GenericNeuronCell" preComponent="silent" postComponent="neuron_to_neuron_exc_syn" weight="1.0"/>
        </continuousProjection>
        <continuousProjection id="NC_ASER_AIBL_FMRFamide" presynapticPopulation="ASER" postsynapticPopulation="AIBL">
            <continuousConnectionInstanceW id="0" preCell="../ASER/0/GenericNeuronCell" postCell="../AIBL/0/GenericNeuronCell" preComponent="silent" postComponent="neuron_to_neuron_exc_syn" weight="2.0"/>
        </continuousProjection>
        <continuousProjection id="NC_ASER_AIBR_FMRFamide" presynapticPopulation="ASER" postsynapticPopulation="AIBR">
            <continuousConnectionInstanceW id="0" preCell="../ASER/0/GenericNeuronCell" postCell="../AIBR/0/GenericNeuronCell" preComponent="silent" postComponent="neuron_to_neuron_exc_syn" weight="10.0"/>
        </continuousProjection>
        <continuousProjection id="NC_ASER_AIYL_FMRFamide" presynapticPopulation="ASER" postsynapticPopulation="AIYL">
            <continuousConnectionInstanceW id="0" preCell="../ASER/0/GenericNeuronCell" postCell="../AIYL/0/GenericNeuronCell" preComponent="silent" postComponent="neuron_to_neuron_exc_syn" weight="2.0"/>
        </continuousProjection>
        <continuousProjection id="NC_ASER_AIYR_FMRFamide" presynapticPopulation="ASER" postsynapticPopulation="AIYR">
            <continuousConnectionInstanceW id="0" preCell="../ASER/0/GenericNeuronCell" postCell="../AIYR/0/GenericNeuronCell" preComponent="silent" postComponent="neuron_to_neuron_exc_syn" weight="14.0"/>
        </continuousProjection>
        <continuousProjection id="NC_ASER_AWCL_FMRFamide" presynapticPopulation="ASER" postsynapticPopulation="AWCL">
            <continuousConnectionInstanceW id="0" preCell="../ASER/0/GenericNeuronCell" postCell="../AWCL/0/GenericNeuronCell" preComponent="silent" postComponent="neuron_to_neuron_exc_syn" weight="1.0"/>
        </continuousProjection>
        <continuousProjection id="NC_ASER_AWCR_FMRFamide" presynapticPopulation="ASER" postsynapticPopulation="AWCR">
            <continuousConnectionInstanceW id="0" preCell="../ASER/0/GenericNeuronCell" postCell="../AWCR/0/GenericNeuronCell" preComponent="silent" postComponent="neuron_to_neuron_exc_syn" weight="1.0"/>
        </continuousProjection>
        <continuousProjection id="NC_ASHL_AIBL_Glutamate" presynapticPopulation="ASHL" postsynapticPopulation="AIBL">
            <continuousConnectionInstanceW id="0" preCell="../ASHL/0/GenericNeuronCell" postCell="../AIBL/0/GenericNeuronCell" preComponent="silent" postComponent="neuron_to_neuron_exc_syn" weight="5.0"/>
        </continuousProjection>
        <continuousProjection id="NC_ASHL_AVAL_Glutamate" presynapticPopulation="ASHL" postsynapticPopulation="AVAL">
            <continuousConnectionInstanceW id="0" preCell="../ASHL/0/GenericNeuronCell" postCell="../AVAL/0/GenericNeuronCell" preComponent="silent" postComponent="neuron_to_neuron_exc_syn" weight="2.0"/>
        </continuousProjection>
        <continuousProjection id="NC_ASHL_AVBL_Glutamate" presynapticPopulation="ASHL" postsynapticPopulation="AVBL">
            <continuousConnectionInstanceW id="0" preCell="../ASHL/0/GenericNeuronCell" postCell="../AVBL/0/GenericNeuronCell" preComponent="silent" postComponent="neuron_to_neuron_exc_syn" weight="6.0"/>
        </continuousProjection>
        <continuousProjection id="NC_ASHR_AIBR_Glutamate" presynapticPopulation="ASHR" postsynapticPopulation="AIBR">
            <continuousConnectionInstanceW id="0" preCell="../ASHR/0/GenericNeuronCell" postCell="../AIBR/0/GenericNeuronCell" preComponent="silent" postComponent="neuron_to_neuron_exc_syn" weight="3.0"/>
        </continuousProjection>
        <continuousProjection id="NC_ASHR_AVAR_Glutamate" presynapticPopulation="ASHR" postsynapticPopulation="AVAR">
            <continuousConnectionInstanceW id="0" preCell="../ASHR/0/GenericNeuronCell" postCell="../AVAR/0/GenericNeuronCell" preComponent="silent" postComponent="neuron_to_neuron_exc_syn" weight="5.0"/>
        </continuousProjection>
        <continuousProjection id="NC_ASHR_AVBR_Glutamate" presynapticPopulation="ASHR" postsynapticPopulation="AVBR">
            <continuousConnectionInstanceW id="0" preCell="../ASHR/0/GenericNeuronCell" postCell="../AVBR/0/GenericNeuronCell" preComponent="silent" postComponent="neuron_to_neuron_exc_syn" weight="3.0"/>
        </continuousProjection>
        <continuousProjection id="NC_AVAL_AVAR_FMRFamide" presynapticPopulation="AVAL" postsynapticPopulation="AVAR">
            <continuousConnectionInstanceW id="0" preCell="../AVAL/0/GenericNeuronCell" postCell="../AVAR/0/GenericNeuronCell" preComponent="silent" postComponent="neuron_to_neuron_exc_syn" weight="2.0"/>
        </continuousProjection>
        <continuousProjection id="NC_AVAL_AVBR_FMRFamide" presynapticPopulation="AVAL" postsynapticPopulation="AVBR">
            <continuousConnectionInstanceW id="0" preCell="../AVAL/0/GenericNeuronCell" postCell="../AVBR/0/GenericNeuronCell" preComponent="silent" postComponent="neuron_to_neuron_exc_syn" weight="1.0"/>
        </continuousProjection>
        <continuousProjection id="NC_AVAL_PVCL_FMRFamide" presynapticPopulation="AVAL" postsynapticPopulation="PVCL">
            <continuousConnectionInstanceW id="0" preCell="../AVAL/0/GenericNeuronCell" postCell="../PVCL/0/GenericNeuronCell" preComponent="silent" postComponent="neuron_to_neuron_exc_syn" weight="10.0"/>
        </continuousProjection>
        <continuousProjection id="NC_AVAL_PVCR_FMRFamide" presynapticPopulation="AVAL" postsynapticPopulation="PVCR">
            <continuousConnectionInstanceW id="0" preCell="../AVAL/0/GenericNeuronCell" postCell="../PVCR/0/GenericNeuronCell" preComponent="silent" postComponent="neuron_to_neuron_exc_syn" weight="6.0"/>
        </continuousProjection>
        <continuousProjection id="NC_AVAR_AVAL_FMRFamide" presynapticPopulation="AVAR" postsynapticPopulation="AVAL">
            <continuousConnectionInstanceW id="0" preCell="../AVAR/0/GenericNeuronCell" postCell="../AVAL/0/GenericNeuronCell" preComponent="silent" postComponent="neuron_to_neuron_exc_syn" weight="1.0"/>
        </continuousProjection>
        <continuousProjection id="NC_AVAR_AVBL_FMRFamide" presynapticPopulation="AVAR" postsynapticPopulation="AVBL">
            <continuousConnectionInstanceW id="0" preCell="../AVAR/0/GenericNeuronCell" postCell="../AVBL/0/GenericNeuronCell" preComponent="silent" postComponent="neuron_to_neuron_exc_syn" weight="1.0"/>
        </continuousProjection>
        <continuousProjection id="NC_AVAR_PVCL_FMRFamide" presynapticPopulation="AVAR" postsynapticPopulation="PVCL">
            <continuousConnectionInstanceW id="0" preCell="../AVAR/0/GenericNeuronCell" postCell="../PVCL/0/GenericNeuronCell" preComponent="silent" postComponent="neuron_to_neuron_exc_syn" weight="7.0"/>
        </continuousProjection>
        <continuousProjection id="NC_AVAR_PVCR_FMRFamide" presynapticPopulation="AVAR" postsynapticPopulation="PVCR">
            <continuousConnectionInstanceW id="0" preCell="../AVAR/0/GenericNeuronCell" postCell="../PVCR/0/GenericNeuronCell" preComponent="silent" postComponent="neuron_to_neuron_exc_syn" weight="5.0"/>
        </continuousProjection>
        <continuousProjection id="NC_AVBL_AVAL_Glutamate" presynapticPopulation="AVBL" postsynapticPopulation="AVAL">
            <continuousConnectionInstanceW id="0" preCell="../AVBL/0/GenericNeuronCell" postCell="../AVAL/0/GenericNeuronCell" preComponent="silent" postComponent="neuron_to_neuron_exc_syn" weight="7.0"/>
        </continuousProjection>
        <continuousProjection id="NC_AVBL_AVAR_Glutamate" presynapticPopulation="AVBL" postsynapticPopulation="AVAR">
            <continuousConnectionInstanceW id="0" preCell="../AVBL/0/GenericNeuronCell" postCell="../AVAR/0/GenericNeuronCell" preComponent="silent" postComponent="neuron_to_neuron_exc_syn" weight="7.0"/>
        </continuousProjection>
        <continuousProjection id="NC_AVBL_AVBR_Glutamate" presynapticPopulation="AVBL" postsynapticPopulation="AVBR">
            <continuousConnectionInstanceW id="0" preCell="../AVBL/0/GenericNeuronCell" postCell="../AVBR/0/GenericNeuronCell" preComponent="silent" postComponent="neuron_to_neuron_exc_syn" weight="1.0"/>
        </continuousProjection>
        <continuousProjection id="NC_AVBR_AVAL_Glutamate" presynapticPopulation="AVBR" postsynapticPopulation="AVAL">
            <continuousConnectionInstanceW id="0" preCell="../AVBR/0/GenericNeuronCell" postCell="../AVAL/0/GenericNeuronCell" preComponent="silent" postComponent="neuron_to_neuron_exc_syn" weight="6.0"/>
        </continuousProjection>
        <continuousProjection id="NC_AVBR_AVAR_Glutamate" presynapticPopulation="AVBR" postsynapticPopulation="AVAR">
            <continuousConnectionInstanceW id="0" preCell="../AVBR/0/GenericNeuronCell" postCell="../AVAR/0/GenericNeuronCell" preComponent="silent" postComponent="neuron_to_neuron_exc_syn" weight="7.0"/>
        </continuousProjection>
        <continuousProjection id="NC_AVBR_AVBL_Glutamate" presynapticPopulation="AVBR" postsynapticPopulation="AVBL">
            <continuousConnectionInstanceW id="0" preCell="../AVBR/0/GenericNeuronCell" postCell="../AVBL/0/GenericNeuronCell" preComponent="silent" postComponent="neuron_to_neuron_exc_syn" weight="1.0"/>
        </continuousProjection>
        <continuousProjection id="NC_AWCL_AIBL_Glutamate" presynapticPopulation="AWCL" postsynapticPopulation="AIBL">
            <continuousConnectionInstanceW id="0" preCell="../AWCL/0/GenericNeuronCell" postCell="../AIBL/0/GenericNeuronCell" preComponent="silent" postComponent="neuron_to_neuron_exc_syn" weight="1.0"/>
        </continuousProjection>
        <continuousProjection id="NC_AWCL_AIBR_Glutamate" presynapticPopulation="AWCL" postsynapticPopulation="AIBR">
            <continuousConnectionInstanceW id="0" preCell="../AWCL/0/GenericNeuronCell" postCell="../AIBR/0/GenericNeuronCell" preComponent="silent" postComponent="neuron_to_neuron_exc_syn" weight="1.0"/>
        </continuousProjection>
        <continuousProjection id="NC_AWCL_AIYL_Glutamate" presynapticPopulation="AWCL" postsynapticPopulation="AIYL">
            <continuousConnectionInstanceW id="0" preCell="../AWCL/0/GenericNeuronCell" postCell="../AIYL/0/GenericNeuronCell" preComponent="silent" postComponent="neuron_to_neuron_exc_syn" weight="10.0"/>
        </continuousProjection>
        <continuousProjection id="NC_AWCL_ASEL_Glutamate" presynapticPopulation="AWCL" postsynapticPopulation="ASEL">
            <continuousConnectionInstanceW id="0" preCell="../AWCL/0/GenericNeuronCell" postCell="../ASEL/0/GenericNeuronCell" preComponent="silent" postComponent="neuron_to_neuron_exc_syn" weight="1.0"/>
        </continuousProjection>
        <continuousProjection id="NC_AWCL_AVAL_Glutamate" presynapticPopulation="AWCL" postsynapticPopulation="AVAL">
            <continuousConnectionInstanceW id="0" preCell="../AWCL/0/GenericNeuronCell" postCell="../AVAL/0/GenericNeuronCell" preComponent="silent" postComponent="neuron_to_neuron_exc_syn" weight="1.0"/>
        </continuousProjection>
        <continuousProjection id="NC_AWCL_AWCR_Glutamate" presynapticPopulation="AWCL" postsynapticPopulation="AWCR">
            <continuousConnectionInstanceW id="0" preCell="../AWCL/0/GenericNeuronCell" postCell="../AWCR/0/GenericNeuronCell" preComponent="silent" postComponent="neuron_to_neuron_exc_syn" weight="1.0"/>
        </continuousProjection>
        <continuousProjection id="NC_AWCR_AIBR_Glutamate" presynapticPopulation="AWCR" postsynapticPopulation="AIBR">
            <continuousConnectionInstanceW id="0" preCell="../AWCR/0/GenericNeuronCell" postCell="../AIBR/0/GenericNeuronCell" preComponent="silent" postComponent="neuron_to_neuron_exc_syn" weight="4.0"/>
        </continuousProjection>
        <continuousProjection id="NC_AWCR_AIYL_Glutamate" presynapticPopulation="AWCR" postsynapticPopulation="AIYL">
            <continuousConnectionInstanceW id="0" preCell="../AWCR/0/GenericNeuronCell" postCell="../AIYL/0/GenericNeuronCell" preComponent="silent" postComponent="neuron_to_neuron_exc_syn" weight="4.0"/>
        </continuousProjection>
        <continuousProjection id="NC_AWCR_AIYR_Glutamate" presynapticPopulation="AWCR" postsynapticPopulation="AIYR">
            <continuousConnectionInstanceW id="0" preCell="../AWCR/0/GenericNeuronCell" postCell="../AIYR/0/GenericNeuronCell" preComponent="silent" postComponent="neuron_to_neuron_exc_syn" weight="9.0"/>
        </continuousProjection>
        <continuousProjection id="NC_AWCR_ASEL_Glutamate" presynapticPopulation="AWCR" postsynapticPopulation="ASEL">
            <continuousConnectionInstanceW id="0" preCell="../AWCR/0/GenericNeuronCell" postCell="../ASEL/0/GenericNeuronCell" preComponent="silent" postComponent="neuron_to_neuron_exc_syn" weight="1.0"/>
        </continuousProjection>
        <continuousProjection id="NC_AWCR_AWCL_Glutamate" presynapticPopulation="AWCR" postsynapticPopulation="AWCL">
            <continuousConnectionInstanceW id="0" preCell="../AWCR/0/GenericNeuronCell" postCell="../AWCL/0/GenericNeuronCell" preComponent="silent" postComponent="neuron_to_neuron_exc_syn" weight="5.0"/>
        </continuousProjection>
        <continuousProjection id="NC_PVCL_AVAL_Glutamate" presynapticPopulation="PVCL" postsynapticPopulation="AVAL">
            <continuousConnectionInstanceW id="0" preCell="../PVCL/0/GenericNeuronCell" postCell="../AVAL/0/GenericNeuronCell" preComponent="silent" postComponent="neuron_to_neuron_exc_syn" weight="1.0"/>
        </continuousProjection>
        <continuousProjection id="NC_PVCL_AVAR_Glutamate" presynapticPopulation="PVCL" postsynapticPopulation="AVAR">
            <continuousConnectionInstanceW id="0" preCell="../PVCL/0/GenericNeuronCell" postCell="../AVAR/0/GenericNeuronCell" preComponent="silent" postComponent="neuron_to_neuron_exc_syn" weight="4.0"/>
        </continuousProjection>
        <continuousProjection id="NC_PVCL_AVBL_Glutamate" presynapticPopulation="PVCL" postsynapticPopulation="AVBL">
            <continuousConnectionInstanceW id="0" preCell="../PVCL/0/GenericNeuronCell" postCell="../AVBL/0/GenericNeuronCell" preComponent="silent" postComponent="neuron_to_neuron_exc_syn" weight="5.0"/>
        </continuousProjection>
        <continuousProjection id="NC_PVCL_AVBR_Glutamate" presynapticPopulation="PVCL" postsynapticPopulation="AVBR">
            <continuousConnectionInstanceW id="0" preCell="../PVCL/0/GenericNeuronCell" postCell="../AVBR/0/GenericNeuronCell" preComponent="silent" postComponent="neuron_to_neuron_exc_syn" weight="12.0"/>
        </continuousProjection>
        <continuousProjection id="NC_PVCL_PVCR_Glutamate" presynapticPopulation="PVCL" postsynapticPopulation="PVCR">
            <continuousConnectionInstanceW id="0" preCell="../PVCL/0/GenericNeuronCell" postCell="../PVCR/0/GenericNeuronCell" preComponent="silent" postComponent="neuron_to_neuron_exc_syn" weight="2.0"/>
        </continuousProjection>
        <continuousProjection id="NC_PVCR_AVAL_Glutamate" presynapticPopulation="PVCR" postsynapticPopulation="AVAL">
            <continuousConnectionInstanceW id="0" preCell="../PVCR/0/GenericNeuronCell" postCell="../AVAL/0/GenericNeuronCell" preComponent="silent" postComponent="neuron_to_neuron_exc_syn" weight="7.0"/>
        </continuousProjection>
        <continuousProjection id="NC_PVCR_AVAR_Glutamate" presynapticPopulation="PVCR" postsynapticPopulation="AVAR">
            <continuousConnectionInstanceW id="0" preCell="../PVCR/0/GenericNeuronCell" postCell="../AVAR/0/GenericNeuronCell" preComponent="silent" postComponent="neuron_to_neuron_exc_syn" weight="7.0"/>
        </continuousProjection>
        <continuousProjection id="NC_PVCR_AVBL_Glutamate" presynapticPopulation="PVCR" postsynapticPopulation="AVBL">
            <continuousConnectionInstanceW id="0" preCell="../PVCR/0/GenericNeuronCell" postCell="../AVBL/0/GenericNeuronCell" preComponent="silent" postComponent="neuron_to_neuron_exc_syn" weight="8.0"/>
        </continuousProjection>
        <continuousProjection id="NC_PVCR_AVBR_Glutamate" presynapticPopulation="PVCR" postsynapticPopulation="AVBR">
            <continuousConnectionInstanceW id="0" preCell="../PVCR/0/GenericNeuronCell" postCell="../AVBR/0/GenericNeuronCell" preComponent="silent" postComponent="neuron_to_neuron_exc_syn" weight="6.0"/>
        </continuousProjection>
        <continuousProjection id="NC_PVCR_PVCL_Glutamate" presynapticPopulation="PVCR" postsynapticPopulation="PVCL">
            <continuousConnectionInstanceW id="0" preCell="../PVCR/0/GenericNeuronCell" postCell="../PVCL/0/GenericNeuronCell" preComponent="silent" postComponent="neuron_to_neuron_exc_syn" weight="3.0"/>
        </continuousProjection>
        <inputList id="Input_ASEL_offset_current" population="ASEL" component="offset_current">
            <input id="0" target="../ASEL/0/GenericNeuronCell" destination="synapses"/>
        </inputList>
        <inputList id="Input_ASER_offset_current" population="ASER" component="offset_current">
            <input id="0" target="../ASER/0/GenericNeuronCell" destination="synapses"/>
        </inputList>
    </network>
</neuroml>
